test
#Mach
0.1
#IYsym IZsym Zsym
0 0 0.0
#Sref Cref Bref
0.801300 0.266268 2.511221
#Xref Yref Zref
0.091168 0.0 0.0


#====================================================================
SURFACE
[WING]
!beginsurface
#Nchordwise Cspace Nspanwise Sspace
8 1.0 12 1.0
#
YDUPLICATE
0.0
#
ANGLE
0.000000

TRANSLATE
# dX dY dZ
0.000000 0.000000 0.000000


#-------------------------------------------------------------
# Root
SECTION
#Xle Yle Zle Chord Ainc Nspanwise Sspace
0.000000 0.000000 0.000000 0.364672 0.000000 12.0 1.0
AFILE
naca2412.dat
CDCL
-1.1686 0.0330   0.3435 0.0055   1.5167 0.0428
CLAF
1.083630


#-------------------------------------------------------------
# Root
SECTION
#Xle Yle Zle Chord Ainc Nspanwise Sspace
0.000000 0.627805 0.000000 0.364672 0.000000 12.0 1.0
AFILE
naca2412.dat
CDCL
-1.1686 0.0330   0.3435 0.0055   1.5167 0.0428
CLAF
1.083630


#-------------------------------------------------------------
# Tip
SECTION
#Xle Yle Zle Chord Ainc Nspanwise Sspace
0.045584 1.255611 0.000000 0.182336 0.000000 12.0 1.0
AFILE
naca2412.dat
CDCL
-1.1686 0.0330   0.3435 0.0055   1.5167 0.0428
CLAF
1.083630
